** written by FreeCAD inp file writer for CalculiX,Abaqus meshes
** highest dimension mesh elements only.

** Nodes
*Node, NSET=Nall
1, 200, 0, 0
2, 200, 10, 0
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

** Volume elements
*Element, TYPE=C3D10, ELSET=Evolumes
975, 1261, 660, 636, 114, 1612, 952, 1611, 1614, 1613, 1615
976, 98, 1259, 635, 659, 1618, 1616, 1617, 1620, 1619, 945
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
** Define element set Eall
*ELSET, ELSET=Eall
Evolumes


***********************************************************
** Element sets for materials and FEM element type (solid, shell, beam, fluid)
** written by write_element_sets_material_and_femelement_type function
*ELSET,ELSET=FemMaterialSolid
Evolumes

***********************************************************
** constraints displacement node sets
** written by write_node_sets_constraints_displacement function
** FemConstraintDisplacment
*NSET,NSET=FemConstraintDisplacment
4,
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
***********************************************************
** constraints transform node sets
** written by write_node_sets_constraints_transform function
** FemConstraintTransform1
*NSET,NSET=CylinFemConstraintTransform1
5,
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** FemConstraintTransform2
*NSET,NSET=CylinFemConstraintTransform2
4,
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
***********************************************************
** Materials
** written by write_materials function
** Young's modulus unit is MPa = N/mm2
** FreeCAD material name: CalculiX-Steel
** FemMaterial
*MATERIAL, NAME=FemMaterial
*ELASTIC
210000, 0.300

***********************************************************
** Sections
** written by write_femelementsets function
*SOLID SECTION, ELSET=FemMaterialSolid, MATERIAL=FemMaterial

***********************************************************
** Transform Constraints
** written by write_constraints_transform function
** FemConstraintTransform1
*TRANSFORM, NSET=CylinFemConstraintTransform1, TYPE=C
10.000000,-3.000000,10.000000,10.000000,17.000000,10.000000
** FemConstraintTransform2
*TRANSFORM, NSET=CylinFemConstraintTransform2, TYPE=C
190.000000,-3.000000,10.000000,190.000000,17.000000,10.000000

***********************************************************
** At least one step is needed to run an CalculiX analysis of FreeCAD
** written by write_step_begin function
*STEP
*STATIC


***********************************************************
** Displacement constraint applied
** written by write_constraints_displacement function
** FemConstraintDisplacment
*BOUNDARY
FemConstraintDisplacment,1


***********************************************************
** constraints pressure element face loads
** written by write_constraints_pressure function
** FemConstraintPressure
*DLOAD
** FemConstraintPressure: face load
1384,P3,10.0
1394,P2,10.0
1397,P2,10.0
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1984,P4,10.0

***********************************************************
** Outputs --> frd file
** written by write_outputs_types function
*NODE FILE
U
*EL FILE
S, E

***********************************************************
** written by write_step_end function
*END STEP

***********************************************************
** CalculiX Input file
** written by write_footer function
**   written by    --> FreeCAD 0.19.22111 +7 (Git)
**   written on    --> Thu Jul 23 01:19:57 2020
**   file name     -->
**   analysis name --> Analysis
**
**
***********************************************************
**  About units:
**  See ccx manual, ccx does not know about any unit.
**  Golden rule: The user must make sure that the numbers he provides have consistent units.
**  The user is the FreeCAD calculix writer module ;-)
**
**  The unit system which is used at Guido Dhodts company: mm, N, s, K
**  Since Length and Mass are connected by Force, if Length is mm the Mass is in t to get N
**  The following units are used to write to inp file:
**
**  Length: mm (this includes the mesh geometry)
**  Mass: t
**  TimeSpan: s
**  Temperature: K
**
**  This leads to:
**  Force: N
**  Pressure: N/mm^2
**  Density: t/mm^2
**  Gravity: mm/s^2
**  Thermal conductivity: t*mm/K*s^3
**  Specific Heat: kJ/t/K = mm^2/s^2/K
**
