** written by FreeCAD inp file writer for CalculiX,Abaqus meshes
** highest dimension mesh elements only.

** Nodes
*Node, NSET=Nall
1, 200, 0, 20
2, 200, 0, 0
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

** Volume elements
*Element, TYPE=C3D10, ELSET=Evolumes
1565, 1018, 521, 1019, 2684, 2694, 2693, 1314, 2696, 2695, 2697
1566, 1525, 1574, 1505, 2682, 1865, 1866, 1864, 2699, 2698, 2700
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
** Define element set Eall
*ELSET, ELSET=Eall
Evolumes


***********************************************************
** Element sets for materials and FEM element type (solid, shell, beam, fluid)
** written by write_element_sets_material_and_femelement_type function
*ELSET,ELSET=FemMaterialSolid
Evolumes

***********************************************************
** constraints displacement node sets
** written by write_node_sets_constraints_displacement function
** FemConstraintDisplacment
*NSET,NSET=FemConstraintDisplacment
7,
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
***********************************************************
** constraints transform node sets
** written by write_node_sets_constraints_transform function
** FemConstraintTransform
*NSET,NSET=CylinFemConstraintTransform
7,
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
***********************************************************
** Materials
** written by write_materials function
** Young's modulus unit is MPa = N/mm2
** FreeCAD material name: CalculiX-Steel
** FemMaterial
*MATERIAL, NAME=FemMaterial
*ELASTIC
210000, 0.300

***********************************************************
** Sections
** written by write_femelementsets function
*SOLID SECTION, ELSET=FemMaterialSolid, MATERIAL=FemMaterial

***********************************************************
** Transform Constraints
** written by write_constraints_transform function
** FemConstraintTransform
*TRANSFORM, NSET=CylinFemConstraintTransform, TYPE=C
0.0,10.0,0.0,0.0,-10.0,0.0

***********************************************************
** At least one step is needed to run an CalculiX analysis of FreeCAD
** written by write_step_begin function
*STEP
*STATIC


***********************************************************
** Displacement constraint applied
** written by write_constraints_displacement function
** FemConstraintDisplacment
*BOUNDARY
FemConstraintDisplacment,1


***********************************************************
** constraints pressure element face loads
** written by write_constraints_pressure function
** FemConstraintPressure
*DLOAD
** FemConstraintPressure: face load
1951,P1,10.0
1953,P4,10.0
2020,P4,10.0
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3409,P4,10.0

***********************************************************
** Outputs --> frd file
** written by write_outputs_types function
*NODE FILE
U
*EL FILE
S, E

***********************************************************
** written by write_step_end function
*END STEP

***********************************************************
** CalculiX Input file
** written by write_footer function
**   written by    --> FreeCAD 0.19.21194 +32 (Git)
**   written on    --> Sun May 24 02:36:37 2020
**   file name     -->
**   analysis name --> Analysis
**
**
**
**   Units
**
**   Geometry (mesh data)        --> mm
**   Materials (Young's modulus) --> N/mm2 = MPa
**   Loads (nodal loads)         --> N
**
